# Specify basic aspects of the simulation.
units lj		# Units for quantities. (lj = reduced units)
atom_style bond	# What features does each atom have?
boundary p p p 		# Boundary conditions in each dimension.

bond_style fene
pair_style lj/cut 1.12246
read_data ${confFileName}
bond_coeff 1 30.0 1.5 1.0 1.0
pair_modify shift yes
pair_coeff * * 1.0 1.0 1.12246

# Integration details,
mass 1 1.0
timestep 0.0025
fix ensFix all nvt temp ${T_target} ${T_target} 0.25
velocity all create ${T_target} ${mySeed} dist gaussian
thermo 100
# Compute the RDF
comm_modify mode single cutoff 6
compute myRDF all rdf ${nRdfBins} cutoff ${rdfCutoff}
fix rdfAvgFix all ave/time 20 1 20 c_myRDF[*] ave running file ${tag}-T${T_target}.rdf overwrite  mode vector

compute rg all gyration
fix rg_out all ave/time 100 1 100 c_rg file rg_${tag}.dat

compute msd all msd
fix msd_out all ave/time 100 1 100 c_msd[4] file msd_${tag}.dat

# the potential energy and pressure
variable myPE equal pe
variable myKE equal ke
variable myTE equal etotal
variable myPress equal press
variable myTemp equal temp
fix thAvgFix all ave/time 10 100 1000 v_myPE v_myKE v_myTE v_myPress v_myTemp file ${tag}-T${T_target}-thermo.txt
dump myDump all atom 100 traj_${tag}.lammpstrj
#Production run
run ${prodSteps}
